# Лабораторная работа №1 студента Карпович Карины
2.
4*sqrt(5 - 2*sqrt(6))/((nthroot(3, 4) + nthroot(2, 4))*(nthroot(2, 4) - nthroot(3, 4))) = -4
(sqrt(5^3 + 6) + cos(|6*5 - 1|))/nthroot(5^5 + 8*5 + 6, 4) = 1.42555
(sum(sin(i/6), i = 1 .. 10) + sum((i - 6)/(i + 6), i = 1 .. 5))/product((6 + 3*i)/(6^2 + 6*i - 6), i = 1 .. 5) = 2003.82
3.
x := -2, -1.8 .. 2
dx := 0.2
y(x) := nthroot(2*e^x + 2^x + 1, 3) + ln(x)^5
x = [-2; -1.8; -1.6; -1.4; -1.2; -1; -0.8; -0.6; -0.4; -0.2; 0; 0.2; 0.4; 0.6; 0.8; 1; 1.2; 1.4; 1.6; 1.8; 2]
y(x) = [306.036 + 160.675i; 267.48 + 200.77i; 219.89 + 238.292i; 161.354 + 271.118i; 89.4687 + 295.73i; 1.3076 + 306.02i; -106.233 + 290.62i; -234.272 + 226.181i; -369.536 + 56.7672i; -381.694 - 391.739i; -50862185 + 24143109i; -9.13661; 1.09796; 1.79834; 1.92973; 2.03574; 2.15015; 2.27769; 2.42949; 2.62017; 2.86434]
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4.
A := [1, 2, 5; 45, 5, 3; 6, 8, 9]
B := [12, 45, 4; 4, 3, 5; 34, 34, 53]
V := [3; 4; 1]
C := A*B
C = [190, 221, 279; 662, 2142, 364; 410, 600, 541]
d := |A|*|B|
d = -1691742
g := transpose(V)*A*V
g = 739
S := B*V
S = [220; 29; 291]
Ε := A^-1*C - B
Ε = [0, 7.10543e-15, 0; 1.42109e-14, 0, 0; -7.10543e-15, 0, 7.10543e-15]
q := max(A)
q = 45
p := min(B)
p = 3
5.
a := -π/2
b := π/2
INT := integral(sin(2*t)^2*(2*t^3 - sqrt(2*t^2 + 1)), t = a .. b)
INT = -2.38835
6.
f(x, y) := 3*x^2 + 3*y^2
# [component: inputs f]
x0 := -5
dx := 0.2
y0 := -5
dy := 0.2
n := 50
