# 6 variant
1
x := -3 .. 3
E := 10^-4
f(x) := x - 4*sin(x) - 1
g(x) := e^(x + 1) + x^2 - 4
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x := -3
x := -2
root(f(x), x) = -2.21008
root(g(x), x) = -1.89511
x := 1
x := 0
root(g(x), x) = 0.354392
root(f(x), x) = -0.342185
2
g(x) := x^4 + 7*x^3 + 9*x^2 + 13*x - 30
A := [-30; 13; 9; 7; 1]
x := polyroots(A) = [-6; -1 + 2i; -1 - 2i; 1]
3  # a
x1 := 1
x2 := 1
x3 := 1
x4 := 1
Given
x1 - 2*x2 - 8*x4 == -7
x1 + 4*x2 - 7*x3 + 6*x4 == -8
x1 + x2 - 5*x3 + x4 == -10
2*x1 - x2 + 2*x4 == 7
Find(x1, x2, x3, x4) = [3; 1; 3; 1]
b
A := [1, -2, 0, -8; 1, 4, -7, 6; 1, 1, -5, 1; 2, -1, 0, 2]
B := [-7; -8; -10; 7]
X := A^-1*B
X = [3; 1; 3; 1]
c
lsolve(A, B) = [3; 1; 3; 1]
4
x := 1
y := 1
Given
cos(x + 0.5) + y == 1
sin(y) - 2*x == 2
V := Minerr(x, y)
V = [-0.950251; 0.0996622]
