# 6 variant
№1
limit(x/sqrt(1 - cos(x)), x → 0+) → sqrt(2)
y(x) := nthroot(2*e^x + 2^x + 1 + ln(x)^5, 3)
a(x) := (d/dx(y(x))) → nthroot(ln(x)^5 + 2*e^x + 2^x + 1, 3)*(2*e^x + 5*ln(x)^4/x + 2^x*ln(2))/(3*(ln(x)^5 + 2*e^x + 2^x + 1))  # error: Эта переменная не определена.
integral((2*x + 3)*sin(x - 2)^2, x) → 3*x/2 - cos(2*x - 4)/4 - 3*sin(2*x - 4)/4 + x^2/2 - x*sin(2*x - 4)/2
№2
x - 4*sin(x) - 1 == 0
0
e^(x + 1) + x^2 - 2 == 0
0
x^4 - 6*x^3 + 4*x^2 + 10*x + 75 == 0
[
    sqrt(57*(28144/27 + 80i*sqrt(9105)/9)^(1/3) + 9*(267636736/729 + 4503040i*sqrt(9105)/243)^(1/3) + 1096)/(6*(28144/27 + 80i*sqrt(9105)/9)^(1/6)) + sqrt(-1096*sqrt(57*(28144/27 + 80i*sqrt(9105)/9)^(1/3) + 9*(267636736/729 + 4503040i*sqrt(9105)/243)^(1/3) + 1096) + 15*sqrt(337728 + 2880i*sqrt(9105)) + 114*(28144/27 + 80i*sqrt(9105)/9)^(1/3)*sqrt(57*(28144/27 + 80i*sqrt(9105)/9)^(1/3) + 9*(267636736/729 + 4503040i*sqrt(9105)/243)^(1/3) + 1096) - 9*(267636736/729 + 4503040i*sqrt(9105)/243)^(1/3)*sqrt(57*(28144/27 + 80i*sqrt(9105)/9)^(1/3) + 9*(267636736/729 + 4503040i*sqrt(9105)/243)^(1/3) + 1096))/(6*(28144/27 + 80i*sqrt(9105)/9)^(1/6)*(57*(28144/27 + 80i*sqrt(9105)/9)^(1/3) + 9*(267636736/729 + 4503040i*sqrt(9105)/243)^(1/3) + 1096)^(1/4)) + 3/2;
    3/2 + sqrt(-1096*sqrt(57*(28144/27 + 80i*sqrt(9105)/9)^(1/3) + 9*(267636736/729 + 4503040i*sqrt(9105)/243)^(1/3) + 1096) - 15*sqrt(337728 + 2880i*sqrt(9105)) + 114*(28144/27 + 80i*sqrt(9105)/9)^(1/3)*sqrt(57*(28144/27 + 80i*sqrt(9105)/9)^(1/3) + 9*(267636736/729 + 4503040i*sqrt(9105)/243)^(1/3) + 1096) - 9*(267636736/729 + 4503040i*sqrt(9105)/243)^(1/3)*sqrt(57*(28144/27 + 80i*sqrt(9105)/9)^(1/3) + 9*(267636736/729 + 4503040i*sqrt(9105)/243)^(1/3) + 1096))/(6*(28144/27 + 80i*sqrt(9105)/9)^(1/6)*(57*(28144/27 + 80i*sqrt(9105)/9)^(1/3) + 9*(267636736/729 + 4503040i*sqrt(9105)/243)^(1/3) + 1096)^(1/4)) - sqrt(57*(28144/27 + 80i*sqrt(9105)/9)^(1/3) + 9*(267636736/729 + 4503040i*sqrt(9105)/243)^(1/3) + 1096)/(6*(28144/27 + 80i*sqrt(9105)/9)^(1/6));
    ((57*(28144/27 + 80i*sqrt(9105)/9)^(1/3) + 9*(267636736/729 + 4503040i*sqrt(9105)/243)^(1/3) + 1096)^(3/4) + 9*(28144/27 + 80i*sqrt(9105)/9)^(1/6)*(57*(28144/27 + 80i*sqrt(9105)/9)^(1/3) + 9*(267636736/729 + 4503040i*sqrt(9105)/243)^(1/3) + 1096)^(1/4) - sqrt(-1096*sqrt(57*(28144/27 + sqrt(9105)*80/9*1i)^(1/3) + 9*(267636736/729 + sqrt(9105)*4503040/243*1i)^(1/3) + 1096) + 15*sqrt(337728 + 2880i*sqrt(9105)) + 114*(28144/27 + sqrt(9105)*80/9*1i)^(1/3)*sqrt(57*(28144/27 + sqrt(9105)*80/9*1i)^(1/3) + 9*(267636736/729 + sqrt(9105)*4503040/243*1i)^(1/3) + 1096) - 9*(267636736/729 + sqrt(9105)*4503040/243*1i)^(1/3)*sqrt(57*(28144/27 + sqrt(9105)*80/9*1i)^(1/3) + 9*(267636736/729 + sqrt(9105)*4503040/243*1i)^(1/3) + 1096)))/(6*(28144/27 + 80i*sqrt(9105)/9)^(1/6)*(57*(28144/27 + 80i*sqrt(9105)/9)^(1/3) + 9*(267636736/729 + 4503040i*sqrt(9105)/243)^(1/3) + 1096)^(1/4));
    3/2 - sqrt(-1096*sqrt(57*(28144/27 + 80i*sqrt(9105)/9)^(1/3) + 9*(267636736/729 + 4503040i*sqrt(9105)/243)^(1/3) + 1096) - 15*sqrt(337728 + 2880i*sqrt(9105)) + 114*(28144/27 + 80i*sqrt(9105)/9)^(1/3)*sqrt(57*(28144/27 + 80i*sqrt(9105)/9)^(1/3) + 9*(267636736/729 + 4503040i*sqrt(9105)/243)^(1/3) + 1096) - 9*(267636736/729 + 4503040i*sqrt(9105)/243)^(1/3)*sqrt(57*(28144/27 + 80i*sqrt(9105)/9)^(1/3) + 9*(267636736/729 + 4503040i*sqrt(9105)/243)^(1/3) + 1096))/(6*(28144/27 + 80i*sqrt(9105)/9)^(1/6)*(57*(28144/27 + 80i*sqrt(9105)/9)^(1/3) + 9*(267636736/729 + 4503040i*sqrt(9105)/243)^(1/3) + 1096)^(1/4)) - sqrt(57*(28144/27 + 80i*sqrt(9105)/9)^(1/3) + 9*(267636736/729 + 4503040i*sqrt(9105)/243)^(1/3) + 1096)/(6*(28144/27 + 80i*sqrt(9105)/9)^(1/6))
]
№3
x := -5 .. 5
f1(x) := sqrt(x)
f2(x) := e^x
f3(x) := ln(x)
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№4
i := 1, 1.2 .. 2
y := 2.92
x := 6.96*10^-11
i = [1; 1.2; 1.4; 1.6; 1.8; 2]
f(i) := if(i < 1.5, i + y, i + x^2)
f(i) = [3.92; 4.12; 4.32; 1.6; 1.8; 2]
